*Heading
** Job name: i1-e4 Model name: i1
** Generated by: Abaqus/CAE 2023
*Preprint, echo=NO, model=NO, history=NO, contact=NO
**
** PARTS
**
*Part, name=frame
*Node
      1,          11.,           7.,   1.41421354
      2,          10.,           6.,           0.
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*Element, type=R3D3
1, 2905, 2904, 2903
2, 2902,  149,  150
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*Element, type=R3D4
 4, 2901, 2900,  147,  148
 5, 2901, 2908, 2899, 2900
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*Node
   9177,           9.,           9.,    1.4142133
*Nset, nset=frame-RefPt_, internal
9177,
*Elset, elset=frame, generate
    1,  9992,     1
*End Part
**
*Part, name=interlocking
*Node
      1,   2.00003028, -0.000169993014,           0.
      2, 0.000229986996,  -1.99996996,           0.
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*Element, type=C3D10
   1, 1213, 1214, 1215, 1216, 2122, 2121, 2120, 2124, 2123, 2125
   2, 1215, 1213, 1217, 1214, 2120, 2127, 2126, 2121, 2122, 2128
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*Nset, nset=Set-1, generate
     1,  14095,      1
*Elset, elset=Set-1, generate
    1,  8657,     1
** Section: Section-1
*Solid Section, elset=Set-1, material=high-strength
,
*End Part
**
**
** ASSEMBLY
**
*Assembly, name=Assembly
**
*Instance, name=frame-1, part=frame
         -4.,          -4.,           0.
*End Instance
**
*Instance, name=interlocking-1, part=interlocking
*End Instance
**
*Nset, nset=Set-1, instance=frame-1, generate
    1,  9176,     1
*Elset, elset=Set-1, instance=frame-1, generate
    1,  9992,     1
*Elset, elset=_Surf-73_S3, internal, instance=interlocking-1
  842, 1045, 1046, 1159, 1311, 1317
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*Elset, elset=_Surf-73_S1, internal, instance=interlocking-1
 1044, 1971, 3633, 4103, 4200, 5378, 5481, 6321, 6401, 7337, 7594, 8474, 8524, 8590
*Elset, elset=_Surf-73_S4, internal, instance=interlocking-1
 1917, 1957, 2029, 2478, 4102, 4144, 4275, 4614, 6262, 6314, 6392, 6680, 8419, 8552
*Elset, elset=_Surf-73_S2, internal, instance=interlocking-1
 2027, 2053, 2093, 2100, 2178, 2463, 4185, 4197, 4313, 6250, 6286, 6390, 6447, 7926, 8594, 8608
*Surface, type=ELEMENT, name=Surf-73
_Surf-73_S3, S3
_Surf-73_S1, S1
_Surf-73_S4, S4
_Surf-73_S2, S2
*Rigid Body, ref node=frame-1.frame-RefPt_, elset=frame-1.frame
*End Assembly
**
** MATERIALS
**
*Material, name=high-strength
*Density
1.,
*Elastic
 2e+12, 0.3
**
** INTERACTION PROPERTIES
**
*Surface Interaction, name=IntProp-1
*Friction
0.,
*Surface Behavior, pressure-overclosure=HARD
** ----------------------------------------------------------------
**
** STEP: Step-1
**
*Step, name=Step-1, nlgeom=YES
*Dynamic, Explicit
, 1.
*Bulk Viscosity
0.06, 1.2
**
** BOUNDARY CONDITIONS
**
** Name: BC-1 Type: Symmetry/Antisymmetry/Encastre
*Boundary
Set-1, ENCASTRE
**
** LOADS
**
** Name: Load-1   Type: Pressure
*Dsload
Surf-73, P, 100.
**
** OUTPUT REQUESTS
**
*Restart, write, number interval=1, time marks=NO
**
** FIELD OUTPUT: F-Output-1
**
*Output, field, variable=PRESELECT
**
** HISTORY OUTPUT: H-Output-1
**
*Output, history, variable=PRESELECT, frequency=1
*End Step
