*Heading
** Job name: interlocking-1e Model name: interlocking-1
** Generated by: Abaqus/CAE 2023
*Preprint, echo=NO, model=NO, history=NO, contact=NO
**
** PARTS
**
*Part, name=frame
*Node
      1,   8.99800014,   8.99800014,   1.41400003
      2,   9.99800014,   7.99800062,           0.
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*Element, type=R3D3
1, 2470, 2465, 2473
20, 2482,  161,  162
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*Element, type=R3D4
 2, 2468, 2467,  149,  150
 3, 2468, 2466, 2474, 2467
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*Node
   6969,   7.99800014,   7.99800014,   1.41400003
*Nset, nset=frame-RefPt_, internal
6969,
*Elset, elset=frame, generate
    1,  7203,     1
*End Part
**
*Part, name=interlocking
*Node
      1,   2.00000024, -1.6999993e-06,           0.
      2, 2.29999864e-06,  -1.99999964,           0.
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*Element, type=C3D10
   1, 1213, 1214, 1215, 1216, 2129, 2128, 2127, 2131, 2130, 2132
   2, 1213, 1217,  140, 1218, 2135, 2134, 2133, 2137, 2136, 2138
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*Nset, nset=Set-1, generate
     1,  14149,      1
*Elset, elset=Set-1, generate
    1,  8697,     1
** Section: Section-1
*Solid Section, elset=Set-1, material=high-strength
,
*End Part
**
**
** ASSEMBLY
**
*Assembly, name=Assembly
**
*Instance, name=frameName, part=frame
         -4.,          -4.,           0.
*End Instance
**
*Instance, name=modelName, part=interlocking
*End Instance
**
*Nset, nset=Set-1, instance=frameName, generate
    1,  6969,     1
*Elset, elset=Set-1, instance=frameName, generate
    1,  7203,     1
*Elset, elset=_Surf-53_S2, internal, instance=modelName
   80, 2041, 2088, 3388, 4186, 4199, 4252, 5654, 6346, 6423, 8531, 8570
*Elset, elset=_Surf-53_S3, internal, instance=modelName
  560,  566,  807, 1107, 1171, 1259
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*Elset, elset=_Surf-53_S4, internal, instance=modelName
 1167, 2051, 3099, 4116, 4149, 4163, 4271, 5480, 6304, 6359, 6422, 7169, 8490, 8610
*Elset, elset=_Surf-53_S1, internal, instance=modelName
 1734, 1740, 1934, 2037, 4290, 6439, 6450, 7545, 8513, 8641, 8654
*Surface, type=ELEMENT, name=Surf-53
_Surf-53_S2, S2
_Surf-53_S3, S3
_Surf-53_S4, S4
_Surf-53_S1, S1
*Rigid Body, ref node=frameName.frame-RefPt_, elset=frameName.frame
*End Assembly
**
** MATERIALS
**
*Material, name=high-strength
*Density
1.,
*Elastic
 2e+12, 0.3
**
** INTERACTION PROPERTIES
**
*Surface Interaction, name=IntProp-1
*Friction
0.,
*Surface Behavior, pressure-overclosure=HARD
** ----------------------------------------------------------------
**
** STEP: Step-1
**
*Step, name=Step-1, nlgeom=YES
*Dynamic, Explicit
, 1.
*Bulk Viscosity
0.06, 1.2
**
** BOUNDARY CONDITIONS
**
** Name: BC-1 Type: Symmetry/Antisymmetry/Encastre
*Boundary
Set-1, ENCASTRE
**
** LOADS
**
** Name: Load-1   Type: Pressure
*Dsload
Surf-53, P, 100.
**
** OUTPUT REQUESTS
**
*Restart, write, number interval=1, time marks=NO
**
** FIELD OUTPUT: F-Output-1
**
*Output, field, variable=PRESELECT
**
** HISTORY OUTPUT: H-Output-1
**
*Output, history, variable=PRESELECT, frequency=1
*End Step
