*Heading
** Job name: rigid-cell-test Model name: interlocking-1
** Generated by: Abaqus/CAE 2023
*Preprint, echo=NO, model=NO, history=NO, contact=NO
**
** PARTS
**
*Part, name=interlocking
*Node
      1,    1.9922291, -0.000169329942,           0.
      2, 0.000229089957, -0.000169329956,           0.
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*Element, type=R3D3
1, 570, 563, 568
33, 578, 577, 575
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*Element, type=R3D4
 2, 549,  41,  42, 553
 3,  46,   2,  47, 550
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*Node
   1561, 0.000169329971, 0.000229089943,   1.40855658
*Nset, nset=interlocking-RefPt_, internal
1561,
*Elset, elset=interlocking, generate
    1,  1604,     1
*End Part
**
**
** ASSEMBLY
**
*Assembly, name=Assembly
**
*Instance, name=interlocking-1, part=interlocking
*End Instance
**
*Nset, nset=Set-2, instance=interlocking-1
    1,    5,    7,    8,    9,   10
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*Elset, elset=Set-2, instance=interlocking-1
  137,  138,  139,  140,  141,  142
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*Elset, elset=_CP-1-interlocking-1_SPOS, internal, instance=interlocking-1, generate
  1,  32,   1
*Surface, type=ELEMENT, name=CP-1-interlocking-1
_CP-1-interlocking-1_SPOS, SPOS
*Elset, elset=_CP-2-interlocking-1_SPOS, internal, instance=interlocking-1, generate
 1276,  1307,     1
*Surface, type=ELEMENT, name=CP-2-interlocking-1
_CP-2-interlocking-1_SPOS, SPOS
*Elset, elset=_CP-38-interlocking-1_SPOS, internal, instance=interlocking-1, generate
 33,  52,   1
*Surface, type=ELEMENT, name=CP-38-interlocking-1
_CP-38-interlocking-1_SPOS, SPOS
*Elset, elset=_CP-39-interlocking-1_SPOS, internal, instance=interlocking-1, generate
 1256,  1275,     1
*Surface, type=ELEMENT, name=CP-39-interlocking-1
_CP-39-interlocking-1_SPOS, SPOS
*Elset, elset=_CP-40-interlocking-1_SPOS, internal, instance=interlocking-1, generate
 53,  72,   1
*Surface, type=ELEMENT, name=CP-40-interlocking-1
_CP-40-interlocking-1_SPOS, SPOS
*Elset, elset=_CP-41-interlocking-1_SPOS, internal, instance=interlocking-1, generate
 434,  453,    1
*Surface, type=ELEMENT, name=CP-41-interlocking-1
_CP-41-interlocking-1_SPOS, SPOS
*Elset, elset=_CP-42-interlocking-1_SPOS, internal, instance=interlocking-1, generate
  73,  104,    1
*Surface, type=ELEMENT, name=CP-42-interlocking-1
_CP-42-interlocking-1_SPOS, SPOS
*Elset, elset=_CP-43-interlocking-1_SPOS, internal, instance=interlocking-1, generate
 402,  433,    1
*Surface, type=ELEMENT, name=CP-43-interlocking-1
_CP-43-interlocking-1_SPOS, SPOS
*Elset, elset=_CP-44-interlocking-1_SNEG, internal, instance=interlocking-1, generate
 250,  329,    1
*Surface, type=ELEMENT, name=CP-44-interlocking-1
_CP-44-interlocking-1_SNEG, SNEG
*Elset, elset=_CP-45-interlocking-1_SPOS, internal, instance=interlocking-1, generate
 250,  329,    1
*Surface, type=ELEMENT, name=CP-45-interlocking-1
_CP-45-interlocking-1_SPOS, SPOS
*Elset, elset=_CP-46-interlocking-1_SPOS, internal, instance=interlocking-1, generate
 454,  473,    1
*Surface, type=ELEMENT, name=CP-46-interlocking-1
_CP-46-interlocking-1_SPOS, SPOS
*Elset, elset=_CP-47-interlocking-1_SPOS, internal, instance=interlocking-1, generate
 835,  854,    1
*Surface, type=ELEMENT, name=CP-47-interlocking-1
_CP-47-interlocking-1_SPOS, SPOS
*Elset, elset=_CP-48-interlocking-1_SPOS, internal, instance=interlocking-1, generate
 474,  505,    1
*Surface, type=ELEMENT, name=CP-48-interlocking-1
_CP-48-interlocking-1_SPOS, SPOS
*Elset, elset=_CP-49-interlocking-1_SPOS, internal, instance=interlocking-1, generate
 803,  834,    1
*Surface, type=ELEMENT, name=CP-49-interlocking-1
_CP-49-interlocking-1_SPOS, SPOS
*Elset, elset=_CP-50-interlocking-1_SNEG, internal, instance=interlocking-1, generate
 651,  730,    1
*Surface, type=ELEMENT, name=CP-50-interlocking-1
_CP-50-interlocking-1_SNEG, SNEG
*Elset, elset=_CP-51-interlocking-1_SPOS, internal, instance=interlocking-1, generate
 651,  730,    1
*Surface, type=ELEMENT, name=CP-51-interlocking-1
_CP-51-interlocking-1_SPOS, SPOS
*Elset, elset=_CP-52-interlocking-1_SPOS, internal, instance=interlocking-1, generate
 855,  874,    1
*Surface, type=ELEMENT, name=CP-52-interlocking-1
_CP-52-interlocking-1_SPOS, SPOS
*Elset, elset=_CP-53-interlocking-1_SPOS, internal, instance=interlocking-1, generate
 1236,  1255,     1
*Surface, type=ELEMENT, name=CP-53-interlocking-1
_CP-53-interlocking-1_SPOS, SPOS
*Elset, elset=_CP-54-interlocking-1_SPOS, internal, instance=interlocking-1, generate
 875,  906,    1
*Surface, type=ELEMENT, name=CP-54-interlocking-1
_CP-54-interlocking-1_SPOS, SPOS
*Elset, elset=_CP-55-interlocking-1_SPOS, internal, instance=interlocking-1, generate
 1204,  1235,     1
*Surface, type=ELEMENT, name=CP-55-interlocking-1
_CP-55-interlocking-1_SPOS, SPOS
*Elset, elset=_CP-56-interlocking-1_SNEG, internal, instance=interlocking-1, generate
 1052,  1131,     1
*Surface, type=ELEMENT, name=CP-56-interlocking-1
_CP-56-interlocking-1_SNEG, SNEG
*Elset, elset=_CP-57-interlocking-1_SPOS, internal, instance=interlocking-1, generate
 1052,  1131,     1
*Surface, type=ELEMENT, name=CP-57-interlocking-1
_CP-57-interlocking-1_SPOS, SPOS
*Elset, elset=_CP-58-interlocking-1_SNEG, internal, instance=interlocking-1, generate
 1453,  1532,     1
*Surface, type=ELEMENT, name=CP-58-interlocking-1
_CP-58-interlocking-1_SNEG, SNEG
*Elset, elset=_CP-59-interlocking-1_SPOS, internal, instance=interlocking-1, generate
 1453,  1532,     1
*Surface, type=ELEMENT, name=CP-59-interlocking-1
_CP-59-interlocking-1_SPOS, SPOS
*Elset, elset=_Surf-56_SPOS, internal, instance=interlocking-1, generate
 1513,  1532,     1
*Surface, type=ELEMENT, name=Surf-56
_Surf-56_SPOS, SPOS
*Elset, elset=_Surf-57_SPOS, internal, instance=interlocking-1, generate
 1361,  1380,     1
*Surface, type=ELEMENT, name=Surf-57
_Surf-57_SPOS, SPOS
*Rigid Body, ref node=interlocking-1.interlocking-RefPt_, elset=interlocking-1.interlocking
*End Assembly
**
** MATERIALS
**
*Material, name=high-strength
*Elastic
 2e+12, 0.3
**
** INTERACTION PROPERTIES
**
*Surface Interaction, name=IntProp-1
1.,
*Friction
0.,
*Surface Behavior, pressure-overclosure=HARD
**
** INTERACTIONS
**
** Interaction: CP-1-interlocking-1-interlocking-1
*Contact Pair, interaction=IntProp-1, type=SURFACE TO SURFACE
CP-2-interlocking-1, CP-1-interlocking-1
** Interaction: CP-2-interlocking-1-interlocking-1
*Contact Pair, interaction=IntProp-1, type=SURFACE TO SURFACE
CP-39-interlocking-1, CP-38-interlocking-1
** Interaction: CP-3-interlocking-1-interlocking-1
*Contact Pair, interaction=IntProp-1, type=SURFACE TO SURFACE
CP-41-interlocking-1, CP-40-interlocking-1
** Interaction: CP-4-interlocking-1-interlocking-1
*Contact Pair, interaction=IntProp-1, type=SURFACE TO SURFACE
CP-43-interlocking-1, CP-42-interlocking-1
** Interaction: CP-5-interlocking-1-interlocking-1
*Contact Pair, interaction=IntProp-1, type=SURFACE TO SURFACE
CP-45-interlocking-1, CP-44-interlocking-1
** Interaction: CP-6-interlocking-1-interlocking-1
*Contact Pair, interaction=IntProp-1, type=SURFACE TO SURFACE
CP-47-interlocking-1, CP-46-interlocking-1
** Interaction: CP-7-interlocking-1-interlocking-1
*Contact Pair, interaction=IntProp-1, type=SURFACE TO SURFACE
CP-49-interlocking-1, CP-48-interlocking-1
** Interaction: CP-8-interlocking-1-interlocking-1
*Contact Pair, interaction=IntProp-1, type=SURFACE TO SURFACE
CP-51-interlocking-1, CP-50-interlocking-1
** Interaction: CP-9-interlocking-1-interlocking-1
*Contact Pair, interaction=IntProp-1, type=SURFACE TO SURFACE
CP-53-interlocking-1, CP-52-interlocking-1
** Interaction: CP-10-interlocking-1-interlocking-1
*Contact Pair, interaction=IntProp-1, type=SURFACE TO SURFACE
CP-55-interlocking-1, CP-54-interlocking-1
** Interaction: CP-11-interlocking-1-interlocking-1
*Contact Pair, interaction=IntProp-1, type=SURFACE TO SURFACE
CP-57-interlocking-1, CP-56-interlocking-1
** Interaction: CP-12-interlocking-1-interlocking-1
*Contact Pair, interaction=IntProp-1, type=SURFACE TO SURFACE
CP-59-interlocking-1, CP-58-interlocking-1
** ----------------------------------------------------------------
**
** STEP: Step-1
**
*Step, name=Step-1, nlgeom=NO
*Static
1., 1., 1e-05, 1.
**
** BOUNDARY CONDITIONS
**
** Name: BC-2 Type: Symmetry/Antisymmetry/Encastre
*Boundary
Set-2, ENCASTRE
**
** LOADS
**
** Name: Load-1   Type: Pressure
*Dsload
Surf-57, P, 100.
**
** OUTPUT REQUESTS
**
*Restart, write, frequency=0
**
** FIELD OUTPUT: F-Output-1
**
*Output, field, variable=PRESELECT
**
** HISTORY OUTPUT: H-Output-1
**
*Output, history, variable=PRESELECT
*End Step
