*Heading
** Job name: script-test Model name: two-cubes
** Generated by: Abaqus/CAE 2023
*Preprint, echo=NO, model=NO, history=NO, contact=NO
**
** PARTS
**
*Part, name=PART-1_geom
*Node
      1,           0.,           0.,           5.
      2,          10.,           0.,           5.
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*Element, type=C3D10
   1,  486,  135,  901,  491, 1953, 1952, 1951, 1955, 1954, 1956
   2,  902,  903,  904,  905, 1959, 1958, 1957, 1961, 1960, 1962
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*Nset, nset=Set-1, generate
     1,  13562,      1
*Elset, elset=Set-1, generate
    1,  8768,     1
** Section: Section-1
*Solid Section, elset=Set-1, material=high-strength
,
*End Part
**
**
** ASSEMBLY
**
*Assembly, name=Assembly
**
*Instance, name=PART-1_geom-1, part=PART-1_geom
*End Instance
**
*Nset, nset=Set-2, instance=PART-1_geom-1, generate
 5,  8,  1
*Nset, nset=Set-3, instance=PART-1_geom-1, generate
  9,  12,   1
*Elset, elset=_Surf-6_S3, internal, instance=PART-1_geom-1
 4493, 4578, 4610, 4649, 5074, 5136
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*Elset, elset=_Surf-6_S4, internal, instance=PART-1_geom-1
 4401, 5544, 5549, 5772, 5972, 6257, 6340, 6380, 6737, 7102, 7212, 7579, 7830
*Elset, elset=_Surf-6_S2, internal, instance=PART-1_geom-1
 6045, 6116, 6154, 6224, 6435, 6507, 6605, 6739, 6823, 7194
*Elset, elset=_Surf-6_S1, internal, instance=PART-1_geom-1
 6703, 6808, 7266, 8024
*Surface, type=ELEMENT, name=Surf-6
_Surf-6_S3, S3
_Surf-6_S4, S4
_Surf-6_S2, S2
_Surf-6_S1, S1
*End Assembly
**
** MATERIALS
**
*Material, name=high-strength
*Elastic
 2e+12, 0.3
**
** INTERACTION PROPERTIES
**
*Surface Interaction, name=IntProp-1
1.,
*Friction
0.,
*Surface Behavior, pressure-overclosure=HARD
** ----------------------------------------------------------------
**
** STEP: Step-1
**
*Step, name=Step-1, nlgeom=NO
*Static
1., 1., 1e-05, 1.
**
** BOUNDARY CONDITIONS
**
** Name: BC-2 Type: Symmetry/Antisymmetry/Encastre
*Boundary
Set-2, ENCASTRE
** Name: BC-3 Type: Symmetry/Antisymmetry/Encastre
*Boundary
Set-3, ZSYMM
**
** LOADS
**
** Name: Load-2   Type: Pressure
*Dsload
Surf-6, P, 100000.
**
** OUTPUT REQUESTS
**
*Restart, write, frequency=0
**
** FIELD OUTPUT: F-Output-1
**
*Output, field, variable=PRESELECT
**
** HISTORY OUTPUT: H-Output-1
**
*Output, history, variable=PRESELECT
*End Step
