*Heading
** Job name: interlocking-1l Model name: Versatile-block-remeshed
** Generated by: Abaqus/CAE 2023
*Preprint, echo=NO, model=NO, history=NO, contact=NO
**
** PARTS
**
*Part, name=frame-block
*Node
      1,   14.1421404,  -14.1421404,           0.
      2,   14.1421404, -0.00749999983,   14.1421404
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*Element, type=R3D3
1, 238, 235, 227
2, 226,  27,  28
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*Element, type=R3D4
 3, 222,  12,  13, 218
 4,  20,   2,  21, 221
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*Node
    729,   14.1421404, -0.00749999983,   14.1421404
*Nset, nset=frame-block-RefPt_, internal
729,
*Elset, elset=frame-block, generate
   1,  743,    1
*End Part
**
*Part, name=interlocking-block
*Node
      1,   14.1421404,  -14.1421404,           0.
      2,   14.1421404, -0.00749999983,   14.1421404
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*Element, type=C3D10
   1,  612,  613,  614,  615, 1369, 1368, 1367, 1371, 1370, 1372
   2,  612,  615,  616,  617, 1371, 1374, 1373, 1376, 1375, 1377
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*Nset, nset=Set-1, generate
    1,  9558,     1
*Elset, elset=Set-1, generate
    1,  6218,     1
** Section: Section-1
*Solid Section, elset=Set-1, material=high-strength
,
*End Part
**
**
** ASSEMBLY
**
*Assembly, name=Assembly
**
*Instance, name=frame-block-1, part=frame-block
*End Instance
**
*Instance, name=frame-block-2, part=frame-block
        14.2,         14.2,           0.
*End Instance
**
*Instance, name=frame-block-3, part=frame-block
        14.2,        -14.2,           0.
*End Instance
**
*Instance, name=frame-block-5, part=frame-block
        28.4,        -28.4,           0.
*End Instance
**
*Instance, name=frame-block-6, part=frame-block
        42.6,         42.6,           0.
*End Instance
**
*Instance, name=frame-block-7, part=frame-block
        42.6,        -42.6,           0.
*End Instance
**
*Instance, name=frame-block-8, part=frame-block
        56.8,         28.4,           0.
*End Instance
**
*Instance, name=frame-block-9, part=frame-block
        56.8,        -28.4,           0.
*End Instance
**
*Instance, name=frame-block-10, part=frame-block
         71.,         14.2,           0.
*End Instance
**
*Instance, name=frame-block-4, part=frame-block
        28.4,         28.4,           0.
*End Instance
**
*Instance, name=frame-block-11, part=frame-block
         71.,        -14.2,           0.
*End Instance
**
*Instance, name=frame-block-12, part=frame-block
        85.2,           0.,           0.
*End Instance
**
*Instance, name=interlocking-block-1, part=interlocking-block
        28.4,           0.,           0.
*End Instance
**
*Instance, name=interlocking-block-2, part=interlocking-block
        42.6,         14.2,           0.
*End Instance
**
*Instance, name=interlocking-block-3, part=interlocking-block
        42.6,        -14.2,           0.
*End Instance
**
*Instance, name=interlocking-block-4, part=interlocking-block
        56.8,           0.,           0.
*End Instance
**
*Nset, nset=Set-3, instance=frame-block-1, generate
   1,  729,    1
*Nset, nset=Set-3, instance=frame-block-2, generate
   1,  729,    1
*Nset, nset=Set-3, instance=frame-block-6, generate
   1,  729,    1
*Nset, nset=Set-3, instance=frame-block-10, generate
   1,  729,    1
*Nset, nset=Set-3, instance=frame-block-8, generate
   1,  729,    1
*Nset, nset=Set-3, instance=frame-block-11, generate
   1,  729,    1
*Nset, nset=Set-3, instance=frame-block-3, generate
   1,  729,    1
*Nset, nset=Set-3, instance=frame-block-7, generate
   1,  729,    1
*Nset, nset=Set-3, instance=frame-block-4, generate
   1,  729,    1
*Nset, nset=Set-3, instance=frame-block-5, generate
   1,  729,    1
*Nset, nset=Set-3, instance=frame-block-9, generate
   1,  729,    1
*Nset, nset=Set-3, instance=frame-block-12, generate
   1,  729,    1
*Elset, elset=Set-3, instance=frame-block-1, generate
   1,  743,    1
*Elset, elset=Set-3, instance=frame-block-2, generate
   1,  743,    1
*Elset, elset=Set-3, instance=frame-block-6, generate
   1,  743,    1
*Elset, elset=Set-3, instance=frame-block-10, generate
   1,  743,    1
*Elset, elset=Set-3, instance=frame-block-8, generate
   1,  743,    1
*Elset, elset=Set-3, instance=frame-block-11, generate
   1,  743,    1
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*Elset, elset=_Surf-115_S3, internal, instance=interlocking-block-2
  118,  272,  291,  543,  969,  991
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*Elset, elset=_Surf-115_S3, internal, instance=interlocking-block-3
  358,  509, 1690, 1707, 2298, 2561
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*Elset, elset=_Surf-115_S4, internal, instance=interlocking-block-2
  677, 1627, 1761, 2051, 2610, 2665, 3506, 3997, 4204
*Elset, elset=_Surf-115_S4, internal, instance=interlocking-block-3
 3822, 5082, 6106
*Elset, elset=_Surf-115_S1, internal, instance=interlocking-block-2
 1731, 1857, 1923, 2645
*Elset, elset=_Surf-115_S2, internal, instance=interlocking-block-2
 1789, 2139, 2509, 2685, 3952, 4470, 6004
*Elset, elset=_Surf-115_S2, internal, instance=interlocking-block-3
  487, 4333, 4425, 4461
*Surface, type=ELEMENT, name=Surf-115
_Surf-115_S3, S3
_Surf-115_S4, S4
_Surf-115_S2, S2
_Surf-115_S1, S1
*Rigid Body, ref node=frame-block-1.frame-block-RefPt_, elset=frame-block-1.frame-block
*Rigid Body, ref node=frame-block-2.frame-block-RefPt_, elset=frame-block-2.frame-block
*Rigid Body, ref node=frame-block-3.frame-block-RefPt_, elset=frame-block-3.frame-block
*Rigid Body, ref node=frame-block-5.frame-block-RefPt_, elset=frame-block-5.frame-block
*Rigid Body, ref node=frame-block-6.frame-block-RefPt_, elset=frame-block-6.frame-block
*Rigid Body, ref node=frame-block-7.frame-block-RefPt_, elset=frame-block-7.frame-block
*Rigid Body, ref node=frame-block-8.frame-block-RefPt_, elset=frame-block-8.frame-block
*Rigid Body, ref node=frame-block-9.frame-block-RefPt_, elset=frame-block-9.frame-block
*Rigid Body, ref node=frame-block-10.frame-block-RefPt_, elset=frame-block-10.frame-block
*Rigid Body, ref node=frame-block-4.frame-block-RefPt_, elset=frame-block-4.frame-block
*Rigid Body, ref node=frame-block-11.frame-block-RefPt_, elset=frame-block-11.frame-block
*Rigid Body, ref node=frame-block-12.frame-block-RefPt_, elset=frame-block-12.frame-block
*End Assembly
**
** MATERIALS
**
*Material, name=high-strength
*Density
1.,
*Elastic
 1e+10, 0.3
**
** INTERACTION PROPERTIES
**
*Surface Interaction, name=IntProp-1
*Friction
0.,
*Surface Behavior, pressure-overclosure=HARD
** ----------------------------------------------------------------
**
** STEP: Step-1
**
*Step, name=Step-1, nlgeom=YES
*Dynamic, Explicit
, 1.
*Bulk Viscosity
0.06, 1.2
**
** BOUNDARY CONDITIONS
**
** Name: BC-1 Type: Symmetry/Antisymmetry/Encastre
*Boundary
Set-3, ENCASTRE
**
** LOADS
**
** Name: Load-1   Type: Pressure
*Dsload
Surf-115, P, 100.
**
** OUTPUT REQUESTS
**
*Restart, write, number interval=1, time marks=NO
**
** FIELD OUTPUT: F-Output-1
**
*Output, field, variable=PRESELECT
**
** HISTORY OUTPUT: H-Output-1
**
*Output, history, variable=PRESELECT, frequency=1
*End Step
