*Heading
** Job name: interlocking-2i Model name: interlocking-1
** Generated by: Abaqus/CAE 2023
*Preprint, echo=NO, model=NO, history=NO, contact=NO
**
** PARTS
**
*Part, name=frame
*Node
      1,   12.0500002,   10.0500002,           0.
      2,   12.0500002,   12.0500002,           0.
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*Element, type=R3D3
1, 2214, 2207, 2212
33, 2223, 2222, 2220
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*Element, type=R3D4
 2, 2193,  161,  162, 2197
 3,  166,    2,  167, 2194
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*Node
   6249,   11.0500011,   11.0500011,   1.41421342
*Nset, nset=frame-RefPt_, internal
6249,
*Elset, elset=frame, generate
    1,  6417,     1
*End Part
**
*Part, name=interlocking
*Node
      1,   8.03999996,        10.04,           0.
      2,        10.04,   8.03999996,           0.
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*Element, type=C3D10M
   1, 2728, 2729, 1360, 2730, 4760, 4759, 4758, 4762, 4761, 4763
   2, 2728, 2731, 2732, 2733, 4766, 4765, 4764, 4768, 4767, 4769
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*Nset, nset=Set-1, generate
     1,  31619,      1
*Elset, elset=Set-1, generate
     1,  19405,      1
** Section: Section-1
*Solid Section, elset=Set-1, material=high-strength
,
*End Part
**
**
** ASSEMBLY
**
*Assembly, name=Assembly
**
*Instance, name=interlocking-1, part=interlocking
*End Instance
**
*Instance, name=frame-1, part=frame
*End Instance
**
*Nset, nset=Set-2, instance=frame-1, generate
    1,  6248,     1
*Elset, elset=Set-2, instance=frame-1, generate
    1,  6417,     1
*Nset, nset=Set-3, instance=frame-1, generate
    1,  6249,     1
*Elset, elset=Set-3, instance=frame-1, generate
    1,  6417,     1
*Elset, elset=_Surf-1_S1, internal, instance=interlocking-1
  6813,  7921,  8388,  8528,  8565, 10157, 10226, 10580, 10622, 10625, 16555, 16620, 16674
*Elset, elset=_Surf-1_S4, internal, instance=interlocking-1
  6959,  7188,  8211,  8372,  8377,  8459
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*Elset, elset=_Surf-1_S3, internal, instance=interlocking-1
  6680,  6789,  7003,  7123,  7150,  7287
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*Elset, elset=_Surf-1_S2, internal, instance=interlocking-1
  7936,  7999,  8383,  8397,  8444,  8529
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*Surface, type=ELEMENT, name=Surf-1
_Surf-1_S1, S1
_Surf-1_S4, S4
_Surf-1_S2, S2
_Surf-1_S3, S3
*Rigid Body, ref node=frame-1.frame-RefPt_, elset=frame-1.frame
*End Assembly
*Amplitude, name=Amp-1, time=TOTAL TIME, definition=EQUALLY SPACED, fixed interval=1.
             0.,              1.
*Amplitude, name=Amp-2, definition=SMOOTH STEP
             0.,              0.,             30.,              1.
**
** MATERIALS
**
*Material, name=high-strength
*Damping, beta=0.001
*Density
 1e+06,
*Elastic
 2e+09, 0.3
**
** INTERACTION PROPERTIES
**
*Surface Interaction, name=IntProp-1
*Friction
0.,
*Surface Behavior, pressure-overclosure=HARD
**
** BOUNDARY CONDITIONS
**
** Name: BC-1 Type: Symmetry/Antisymmetry/Encastre
*Boundary
Set-3, ENCASTRE
**
** INTERACTIONS
**
** Interaction: Int-1
*Contact, op=NEW
*Contact Inclusions, ALL EXTERIOR
*Contact Property Assignment
 ,  , IntProp-1
** ----------------------------------------------------------------
**
** STEP: Step-1
**
*Step, name=Step-1, nlgeom=YES
*Dynamic, Explicit
, 30.
*Bulk Viscosity
0.06, 1.2
**
** LOADS
**
** Name: Load-1   Type: Pressure
*Dsload, amplitude=Amp-2
Surf-1, P, 1.
**
** OUTPUT REQUESTS
**
*Restart, write, number interval=1, time marks=NO
**
** FIELD OUTPUT: F-Output-1
**
*Output, field, number interval=100
*Node Output
A, RF, U, V
*Element Output, directions=YES
EVF, LE, PE, PEEQ, PEEQVAVG, PEVAVG, S, SVAVG
*Contact Output
CDISP, CFORCE, CSTATUS, CSTRESS
**
** HISTORY OUTPUT: H-Output-1
**
*Output, history, variable=PRESELECT
*End Step
** ----------------------------------------------------------------
**
** STEP: Step-2
**
*Step, name=Step-2, nlgeom=YES
*Dynamic, Explicit
, 60.
*Bulk Viscosity
0.06, 1.2
**
** LOADS
**
** Name: Load-1   Type: Pressure
**
** OUTPUT REQUESTS
**
*Restart, write, number interval=1, time marks=NO
**
** FIELD OUTPUT: F-Output-1
**
*Output, field, time interval=1.
*Node Output
A, RF, U, V
*Element Output, directions=YES
EVF, LE, PE, PEEQ, PEEQVAVG, PEVAVG, S, SVAVG
*Contact Output
CDISP, CFORCE, CSTATUS, CSTRESS
**
** HISTORY OUTPUT: H-Output-1
**
*Output, history, variable=PRESELECT
*End Step
